dimension     3
boundary      p    p    p
processors    2    2    3
units         real
atom_style    full
pair_style    lj/cut/coul/long 12.0

kspace_style  pppm    1.0e-4
read_data    in_tube12.data
## 1:H    2:O    3:C   4:Na
pair_coeff   1  1  0       0       ###H-H
pair_coeff   2  2  0.1553  3.166   ###O-O
pair_coeff   3  3  0.1050  3.851   ###C-C
pair_coeff   1  2  0       0       ###H-O
pair_coeff   1  3  0       0       ###H-C
pair_coeff   2  3  0.0747  3.19    ###O-C
pair_coeff   4  4  0.1000  2.583   ###Na-Na
pair_coeff   1  4  0       0       ###H-Na
pair_coeff   2  4  0.1246  2.876   ###O-Na
pair_coeff   3  4  0.1025  3.154   ###C-Na

bond_style   hybrid  morse  harmonic
bond_coeff   1   morse     114.4092    2.1867    1.418
bond_coeff   2   harmonic  450     1
# 1   C-C
# 2   O-H

angle_style   hybrid  harmonic  cosine/squared
angle_coeff   1    cosine/squared   67.1548   120
angle_coeff   2    harmonic         55        109.47
# 1  C-C-C
# 2  H-O-H

dihedral_style   harmonic
dihedral_coeff   1   3.0006    -1   2
# 1   C-C-C-C

group  water     type   1  2     #H+O
group  oxide     type   2        #O
group  tube      type   3        #C
group  channel   type   3  4     #C+Na
group  na        type   4        #Na
group  structure type   1  2  3  #H+O+C

neighbor      2.0      nsq
neigh_modify  exclude  molecule   all

##  Stage  1 :minimize

compute  structTemp  structure  temp
compute  waterTemp   water      temp
thermo_style    custom step c_waterTemp ke pe
thermo   1000

timestep   0.001
fix   1    water     nvt       temp    300   300  100.0
fix   2    all       shake     1.0e-12   20   0   b  2  a  2
fix   3    channel   setforce  0   0   0
fix   4    channel   spring/self    2000
fix   6    tube      momentum     1     linear   1   1   1  angular

velocity   channel    set    0    0    0    units    box

dump  1   all      xyz  1000   equil_all_1.xyz
dump  2   na       xyz  1000   equil_na_1.xyz
run      500000

##  Stage  2 :equilibrium

unfix  1
fix    1   water   npt  temp  300  300  100.0  x  0  0  1000  y  0  0  1000  couple xy

thermo_style    custom  step  c_waterTemp  ke  pe  pxx  pyy  xlo  xhi  lx  ylo  yhi  ly
thermo   10000

timestep   1

undump  1
undump  2
dump  1   all   xyz   10000   equil_all_2.xyz
dump  2   na    xyz   10000   equil_na_2.xyz

run      500000

unfix  1
unfix  3
unfix  4
fix    1   structure  nvt   temp   300   300  100.0
fix    3   na    setforce  0  0  0
fix    4   na    spring/self  2000

undump  1
undump  2
dump   1   all   xyz  5000   equil_all_3.xyz
dump   2   na    xyz  5000   equil_na_3.xyz

run       500000

write_restart   equil_tube4_na.restart

##  Stage  3 : smd_forward

velocity     na    set    0    0    0    units    box

compute   1   na  com

unfix  3
unfix  4
fix    3    na   nve
fix    4    na   setforce     0     0     NULL
fix    5    na   smd   cvel   20    0.00002  tether   NULL  NULL   100   0.0

thermo_style    custom step c_structTemp ke pe f_5[1] f_5[2] f_5[3] f_5[4] f_5[5] f_5[6] f_5[7] c_1[3]
thermo   10

undump  1
undump  2
dump    1    all    xyz   10000   smd_tube4_na_f1.xyz
dump    2    na     xyz   10000   na_f1.xyz

run       2043820
write_restart    tube4_na_forward1.restart

velocity     na    set    0    0    0    units    box

unfix    3
unfix    4
unfix    5

fix    4   na   setforce     0    0    0
fix    5   na   momentum     1     linear    1     1     1

thermo_style    custom step c_structTemp ke pe
thermo     1000

undump    1
undump    2
dump      1    all    xyz   10000   equil_smd_all.xyz
dump      2    na     xyz   10000   equil_smd_na.xyz

run       100000
write_restart    equil_tube4_na_forward1_reverse1.restart

undump    1
undump    2
dump      1    all    xyz   10000   smd_tube4_na_r1.xyz
dump      2    na     xyz   10000   na_r1.xyz

unfix    4
unfix    5
fix    3   na   nve
fix    4   na   setforce     0     0     NULL
fix    5   na   smd   cvel  20    -0.00002  tether   NULL  NULL   100   0.0

thermo_style    custom step c_structTemp ke pe f_5[1] f_5[2] f_5[3] f_5[4] f_5[5] f_5[6] f_5[7] c_1[3]
thermo   10

run       2043820
write_restart    tube4_na_reverse1.restart
