dimension    3
boundary     p    p    p
processors   2    2    3

units        real
atom_style   full
pair_style   lj/cut/coul/long 12.0

kspace_style pppm    1.0e-4
read_data    final_10pistonfo5mol_0.2mol.data

## 1H    2:O   3:Na    4:Cl    5:C

pair_coeff   1   1   0.0       0.0     ###H-H
pair_coeff   2   2   0.1554    3.166   ###O-O
pair_coeff   3   3   0.3526    2.1595  ###Na-Na
pair_coeff   4   4   0.0128    4.8305  ###Cl-Cl
pair_coeff   5   5   0.1051    3.851   ###C-C
pair_coeff   6   6   0.0012    3.851   ###C-C_base
pair_coeff   7   7   0         0       ###H-H_upper
pair_coeff   8   8   0.1554    3.166   ###O-O_upper
pair_coeff   9   9   0.0012    3.851   ###C-C_up
pair_coeff  10  10   0.3526    2.1595  ###Na-Na_upper
pair_coeff  11  11   0.0128    4.8305  ###Cl-Cl_upper

pair_modify shift yes mix geometric
pair_coeff   2   5   0.0936    3.19    ###O-C
pair_coeff   5   8   0.0936    3.19    ###O-C

bond_style     hybrid  morse  harmonic
bond_coeff     1   harmonic  450     1
bond_coeff     2   morse     114.4092    2.1867    1.418
# 1   O-H
# 2   C-C
# 3   C-HC

angle_style    hybrid  harmonic  cosine/squared
angle_coeff    1    harmonic         55        109.47
angle_coeff    2    cosine/squared   67.1548   120
# 1  H-O-H
# 2  C-C-C
# 3  C-C-HC

dihedral_style  harmonic
dihedral_coeff  1   3.0006    -1   2
# 1   C-C-C-C

neighbor        2.0         nsq
neigh_modify    exclude     molecule     all

group  water        type   1  2  7  8
group  water_up     type   7  8
group  oxide_up     type   8
group  water_down   type   1  2
group  oxide_down   type   2
group  solvate_down type   1  2  3  4
group  solvate_up   type   7  8  10  11
group  ions      type   3  4  10  11
group  gra_mid   type   5
group  gra_base  type   6
group  gra_up    type   9
group  plate     type   6  9
group  graphene  type   5  6  9
group  solvate   type   1  2  3  4  7  8  10  11
group  na        type   3 10
group  cl        type   4 11
group  structure type   1  2  3  4  5  7  8  9  10  11

min_style         sd
minimize          1.0e-6     1.0e-8     1000    100000

fix    1    all       shake  1.0e-12   20   0   b  1  a  1

fix    3    graphene  momentum     1    linear    1    1    1  angular
fix    4    solvate   nvt   temp  300  300  100.0
fix    5    graphene  setforce   0   0   0

compute  1  gra_base  com
compute  2  gra_mid   com
compute  3  gra_up    com
compute  solTemp solvate temp
compute  peratom all stress/atom  virial

compute  base gra_base reduce sum c_peratom[1] c_peratom[2] c_peratom[3]
compute  mid  gra_mid  reduce sum c_peratom[1] c_peratom[2] c_peratom[3]
compute  cup  gra_up   reduce sum c_peratom[1] c_peratom[2] c_peratom[3]

variable cvol equal lx*ly*3.2
variable vup equal lx*ly*(c_2[3]-60)
variable vdown equal lx*ly*(60-c_1[3])
variable low_osmosis equal c_base[3]/v_cvol
variable mid_osmosis equal c_base[3]/v_cvol
variable up_osmosis  equal c_cup[3]/v_cvol
variable osmosis equal v_low_osmosis-v_up_osmosis

thermo_style    custom step c_solTemp ke pe pxx pyy pzz c_1[3] c_3[3]
thermo_modify   flush yes
thermo   1000

dump    5   all   xyz  10000  all.xyz
timestep  0.001
run       50000
timestep  0.5
run       50000
thermo   100

undump  5

#push
timestep  1
velocity  solvate  create  300.0  12345  rot  yes  dist  gaussian  units  box

unfix  3
unfix  4
unfix  5

fix    2    gra_up    nve
fix    3    solvate   nvt   temp  300  300  100.0
fix    4    gra_mid   momentum     1    linear    1    1    1  angular
fix    6    plate  momentum     1    linear    1    1    0  angular
fix    7    gra_mid   setforce   0   0   0
fix    5    gra_base  smd  cfor  1.5292844   tether  NULL  NULL  200  0
fix    8    gra_up    smd  cfor -1.5292844   tether  NULL  NULL  200  0
fix    9    gra_base  nve

thermo_style  custom step c_solTemp c_1[3] c_2[3] c_3[3] v_low_osmosis v_mid_osmosis v_up_osmosis ke
thermo  100

dump    1    oxide_up    xyz   1000  equil_oxide_up.xyz
dump    2    oxide_down  xyz   1000  equil_oxide_down.xyz
dump    3    ions  xyz  1000  equil_ions.xyz
dump    4    all   xyz  1000  equil.xyz

run     5000
unfix   5
unfix   8
fix    5    gra_base  smd  cfor  0.15292844   tether  NULL  NULL  200  0
fix    8    gra_up    smd  cfor -0.15292844   tether  NULL  NULL  200  0
run     5000
unfix   5
unfix   8
fix    5    gra_base  smd  cfor  0.015292844   tether  NULL  NULL  200  0
fix    8    gra_up    smd  cfor -0.015292844   tether  NULL  NULL  200  0
run     5000
unfix   5
unfix   8
fix    5    gra_base  smd  cfor  0.0015292844   tether  NULL  NULL  200  0
fix    8    gra_up    smd  cfor -0.0015292844   tether  NULL  NULL  200  0
run     5000

write_restart   tube10_pore.restart

unfix   2
unfix   5
unfix   7
unfix   8
unfix   9
fix    2    gra_mid   nve
fix    5    gra_base  smd  cfor  5.292844e-4  tether  NULL  NULL  200  0
fix    8    gra_up    smd  cfor -5.292844e-4  tether  NULL  NULL  200  0
fix    9    gra_base  nve
fix   10    gra_up    nve
run     100000

write_restart   equil.restart

timestep  2
undump  1
undump  2
undump  3
undump  4

fix  11  all ave/time 1 100 100 v_low_osmosis v_up_osmosis v_osmosis mode scalar ave one file pressure_profile1

dump    1    oxide_up    xyz   1000  f_oxide_up.xyz
dump    2    oxide_down  xyz   1000  f_oxide_down.xyz
dump    3    ions  xyz  1000  f_equil_ions.xyz
dump    4    all   xyz  10000  f_equil.xyz
dump    5    water xyz  100   water.xyz
dump_modify  5  element H O H O sort id

restart   2000000  state1.restart

run      15000000
